<neuroml xmlns="http://www.neuroml.org/schema/neuroml2"  xmlns:xs="http://www.w3.org/2001/XMLSchema" xmlns:xsi="http://www.w3.org/2001/XMLSchema-instance" xsi:schemaLocation="http://www.neuroml.org/schema/neuroml2 https://raw.github.com/NeuroML/NeuroML2/development/Schemas/NeuroML2/NeuroML_v2.3.xsd" id="HL23">
    <include href="HL23PV.cell.nml"/>
    <include href="HL23PYR.cell.nml"/>
    <network id="HL23Net" type="networkWithTemperature" temperature="34 degC">
        <population id="HL23PV_pop" component="HL23PV" type="populationList">
            <property tag="region" value="L23"/>
            <instance id="0">
                <location x="0." y="0." z="0."/>
            </instance>
        </population>
        <population id="HL23PYR_pop" component="HL23PYR" type="populationList">
            <property tag="region" value="L23"/>
            <instance id="0">
                <location x="500." y="0." z="0."/>
            </instance>
        </population>
    </network>
</neuroml>
