<neuroml xmlns="http://www.neuroml.org/schema/neuroml2"  xmlns:xs="http://www.w3.org/2001/XMLSchema" xmlns:xsi="http://www.w3.org/2001/XMLSchema-instance" xsi:schemaLocation="http://www.neuroml.org/schema/neuroml2 https://raw.github.com/NeuroML/NeuroML2/development/Schemas/NeuroML2/NeuroML_v2.3.1.xsd" id="HL23Network">
    <include href="rotated_cells/HL23PYR_sim.cell.nml"/>
    <include href="rotated_cells/HL23SST_sim.cell.nml"/>
    <include href="rotated_cells/HL23PV_sim.cell.nml"/>
    <include href="rotated_cells/HL23VIP_sim.cell.nml"/>
    <pulseGenerator id="pg_0" delay="100ms" duration="1000ms" amplitude="0.2nA"/>
    <network id="HL23Network" temperature="34.0 degC">
        <notes>L23 network at 0.001 scale</notes>
        <population id="HL23PYR_pop" component="HL23PYR_sim" type="populationList">
            <property tag="region" value="L23"/>
            <instance id="0">
                <location x="-224.803300636861707" y="-5.805105764465801" z="-979.304497782459066"/>
            </instance>
            <instance id="1">
                <location x="-152.804536879868778" y="-31.472244570110107" z="-815.15690867089404"/>
            </instance>
        </population>
        <population id="HL23SST_pop" component="HL23SST_sim" type="populationList">
            <property tag="region" value="L23"/>
            <instance id="0">
                <location x="44.921359908303039" y="49.932050003806296" z="-990.870141338771077"/>
            </instance>
            <instance id="1">
                <location x="-102.034992538473702" y="-159.258132793744238" z="-1468.12713935954207"/>
            </instance>
        </population>
        <population id="HL23PV_pop" component="HL23PV_sim" type="populationList">
            <property tag="region" value="L23"/>
            <instance id="0">
                <location x="-150.38813344036501" y="128.256798996629385" z="-1191.954516681976202"/>
            </instance>
            <instance id="1">
                <location x="126.488309566699826" y="-111.718493667912696" z="-863.976779452796563"/>
            </instance>
        </population>
        <population id="HL23VIP_pop" component="HL23VIP_sim" type="populationList">
            <property tag="region" value="L23"/>
            <instance id="0">
                <location x="107.220515394643002" y="-133.086804324342381" z="-1204.071243995782879"/>
            </instance>
            <instance id="1">
                <location x="-216.680693083436012" y="13.258918046615387" z="-600.794674206274635"/>
            </instance>
        </population>
        <inputList id="input_HL23PYR_pop" population="HL23PYR_pop" component="pg_0">
            <input id="0" target="../HL23PYR_pop/0/HL23PYR_sim" destination="synapses"/>
            <input id="1" target="../HL23PYR_pop/1/HL23PYR_sim" destination="synapses"/>
        </inputList>
        <inputList id="input_HL23SST_pop" population="HL23SST_pop" component="pg_0">
            <input id="2" target="../HL23SST_pop/0/HL23SST_sim" destination="synapses"/>
            <input id="3" target="../HL23SST_pop/1/HL23SST_sim" destination="synapses"/>
        </inputList>
        <inputList id="input_HL23PV_pop" population="HL23PV_pop" component="pg_0">
            <input id="4" target="../HL23PV_pop/0/HL23PV_sim" destination="synapses"/>
            <input id="5" target="../HL23PV_pop/1/HL23PV_sim" destination="synapses"/>
        </inputList>
        <inputList id="input_HL23VIP_pop" population="HL23VIP_pop" component="pg_0">
            <input id="6" target="../HL23VIP_pop/0/HL23VIP_sim" destination="synapses"/>
            <input id="7" target="../HL23VIP_pop/1/HL23VIP_sim" destination="synapses"/>
        </inputList>
    </network>
</neuroml>
