<neuroml xmlns="http://www.neuroml.org/schema/neuroml2"  xmlns:xs="http://www.w3.org/2001/XMLSchema" xmlns:xsi="http://www.w3.org/2001/XMLSchema-instance" xsi:schemaLocation="http://www.neuroml.org/schema/neuroml2 https://raw.github.com/NeuroML/NeuroML2/development/Schemas/NeuroML2/NeuroML_v2.3.xsd" id="HL23Network">
    <include href="rotated_cells/HL23PYR_0.cell.nml"/>
    <include href="rotated_cells/HL23PYR_397.cell.nml"/>
    <include href="rotated_cells/HL23PYR_794.cell.nml"/>
    <include href="rotated_cells/HL23PYR_388.cell.nml"/>
    <include href="rotated_cells/HL23PYR_785.cell.nml"/>
    <include href="rotated_cells/HL23PYR_379.cell.nml"/>
    <include href="rotated_cells/HL23PYR_776.cell.nml"/>
    <include href="rotated_cells/HL23PYR_394.cell.nml"/>
    <include href="rotated_cells/HL23SST_804.cell.nml"/>
    <include href="rotated_cells/HL23SST_816.cell.nml"/>
    <include href="rotated_cells/HL23PV_852.cell.nml"/>
    <include href="rotated_cells/HL23PV_864.cell.nml"/>
    <include href="rotated_cells/HL23VIP_924.cell.nml"/>
    <include href="rotated_cells/HL23VIP_936.cell.nml"/>
    <network id="HL23Network" temperature="34.0 degC">
        <notes>L23 network at 0.01 scale</notes>
        <population id="HL23PYR_pop_0" component="HL23PYR_0" type="populationList">
            <property tag="region" value="L23"/>
            <instance id="0">
                <location x="-221.223306399760617" y="84.192327970444907" z="-841.488627155949189"/>
            </instance>
        </population>
        <population id="HL23PYR_pop_397" component="HL23PYR_397" type="populationList">
            <property tag="region" value="L23"/>
            <instance id="0">
                <location x="186.711303919687111" y="-108.088098299224441" z="-842.085796297591742"/>
            </instance>
        </population>
        <population id="HL23PYR_pop_794" component="HL23PYR_794" type="populationList">
            <property tag="region" value="L23"/>
            <instance id="0">
                <location x="-171.332036406190724" y="174.281129262744628" z="-983.946214887313204"/>
            </instance>
        </population>
        <population id="HL23PYR_pop_388" component="HL23PYR_388" type="populationList">
            <property tag="region" value="L23"/>
            <instance id="0">
                <location x="-65.680911263546363" y="-235.799658273611328" z="-705.129130001679641"/>
            </instance>
        </population>
        <population id="HL23PYR_pop_785" component="HL23PYR_785" type="populationList">
            <property tag="region" value="L23"/>
            <instance id="0">
                <location x="193.859487156738453" y="-141.113442226513342" z="-1289.199460195959091"/>
            </instance>
        </population>
        <population id="HL23PYR_pop_379" component="HL23PYR_379" type="populationList">
            <property tag="region" value="L23"/>
            <instance id="0">
                <location x="29.567558509365654" y="103.017517718606726" z="-1206.155865497995592"/>
            </instance>
        </population>
        <population id="HL23PYR_pop_776" component="HL23PYR_776" type="populationList">
            <property tag="region" value="L23"/>
            <instance id="0">
                <location x="-71.604517751624186" y="37.946322703901245" z="-1367.531552376586433"/>
            </instance>
        </population>
        <population id="HL23PYR_pop_394" component="HL23PYR_394" type="populationList">
            <property tag="region" value="L23"/>
            <instance id="0">
                <location x="91.580909358024982" y="65.813723334521015" z="-620.4714273751772"/>
            </instance>
        </population>
        <population id="HL23SST_pop_804" component="HL23SST_804" type="populationList">
            <property tag="region" value="L23"/>
            <instance id="0">
                <location x="106.350954605553099" y="-214.951800779721538" z="-645.5753185087774"/>
            </instance>
        </population>
        <population id="HL23SST_pop_816" component="HL23SST_816" type="populationList">
            <property tag="region" value="L23"/>
            <instance id="0">
                <location x="-206.462723262819111" y="-23.384348836400449" z="-675.156452413023658"/>
            </instance>
        </population>
        <population id="HL23PV_pop_852" component="HL23PV_852" type="populationList">
            <property tag="region" value="L23"/>
            <instance id="0">
                <location x="-65.390056656730806" y="-116.993532553848922" z="-946.991073553129127"/>
            </instance>
        </population>
        <population id="HL23PV_pop_864" component="HL23PV_864" type="populationList">
            <property tag="region" value="L23"/>
            <instance id="0">
                <location x="110.372916240357171" y="-23.733806935129497" z="-918.42937440240803"/>
            </instance>
        </population>
        <population id="HL23VIP_pop_924" component="HL23VIP_924" type="populationList">
            <property tag="region" value="L23"/>
            <instance id="0">
                <location x="155.238762493285833" y="108.47285030975101" z="-620.439995080828112"/>
            </instance>
        </population>
        <population id="HL23VIP_pop_936" component="HL23VIP_936" type="populationList">
            <property tag="region" value="L23"/>
            <instance id="0">
                <location x="118.727725395658069" y="115.43567054935167" z="-910.081605547348772"/>
            </instance>
        </population>
        <inputList id="Gfluct_0" population="HL23PYR_pop_0" component="Gfluct_HL23PYR_0_5">
            <input id="0" target="../HL23PYR_pop_0/0/HL23PYR_0" destination="synapses" segmentId="905" fractionAlong="0.885114796445408"/>
            <input id="1" target="../HL23PYR_pop_0/0/HL23PYR_0" destination="synapses" segmentId="1205" fractionAlong="0.851171143911959"/>
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        </inputList>
        <inputList id="Gfluct_1" population="HL23PYR_pop_0" component="Gfluct_HL23PYR_0_1">
            <input id="18" target="../HL23PYR_pop_0/0/HL23PYR_0" destination="synapses" segmentId="5626" fractionAlong="0.9431395536055"/>
            <input id="19" target="../HL23PYR_pop_0/0/HL23PYR_0" destination="synapses" segmentId="2132" fractionAlong="0.953249395378716"/>
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        </inputList>
        <inputList id="Gfluct_2" population="HL23PYR_pop_0" component="Gfluct_HL23PYR_0_3">
            <input id="27" target="../HL23PYR_pop_0/0/HL23PYR_0" destination="synapses" segmentId="2316" fractionAlong="0.982179433270446"/>
            <input id="28" target="../HL23PYR_pop_0/0/HL23PYR_0" destination="synapses" segmentId="4965" fractionAlong="0.919038444753989"/>
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        </inputList>
        <inputList id="Gfluct_3" population="HL23PYR_pop_0" component="Gfluct_HL23PYR_0_7">
            <input id="38" target="../HL23PYR_pop_0/0/HL23PYR_0" destination="synapses" segmentId="3938" fractionAlong="0.516208173623192"/>
            <input id="39" target="../HL23PYR_pop_0/0/HL23PYR_0" destination="synapses" segmentId="4371" fractionAlong="0.990298519967635"/>
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        </inputList>
        <inputList id="Gfluct_4" population="HL23PYR_pop_0" component="Gfluct_HL23PYR_0_9">
            <input id="50" target="../HL23PYR_pop_0/0/HL23PYR_0" destination="synapses" segmentId="2813" fractionAlong="0.971705983774493"/>
            <input id="51" target="../HL23PYR_pop_0/0/HL23PYR_0" destination="synapses" segmentId="4551" fractionAlong="0.824427134963368"/>
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        </inputList>
        <inputList id="Gfluct_5" population="HL23PYR_pop_397" component="Gfluct_HL23PYR_0_5">
            <input id="57" target="../HL23PYR_pop_397/0/HL23PYR_397" destination="synapses" segmentId="905" fractionAlong="0.885114796445408"/>
            <input id="58" target="../HL23PYR_pop_397/0/HL23PYR_397" destination="synapses" segmentId="1205" fractionAlong="0.851171143911959"/>
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        </inputList>
        <inputList id="Gfluct_6" population="HL23PYR_pop_397" component="Gfluct_HL23PYR_0_1">
            <input id="75" target="../HL23PYR_pop_397/0/HL23PYR_397" destination="synapses" segmentId="5626" fractionAlong="0.9431395536055"/>
            <input id="76" target="../HL23PYR_pop_397/0/HL23PYR_397" destination="synapses" segmentId="2132" fractionAlong="0.953249395378716"/>
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        </inputList>
        <inputList id="Gfluct_7" population="HL23PYR_pop_397" component="Gfluct_HL23PYR_0_3">
            <input id="84" target="../HL23PYR_pop_397/0/HL23PYR_397" destination="synapses" segmentId="2316" fractionAlong="0.982179433270446"/>
            <input id="85" target="../HL23PYR_pop_397/0/HL23PYR_397" destination="synapses" segmentId="4965" fractionAlong="0.919038444753989"/>
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        </inputList>
        <inputList id="Gfluct_8" population="HL23PYR_pop_397" component="Gfluct_HL23PYR_0_7">
            <input id="95" target="../HL23PYR_pop_397/0/HL23PYR_397" destination="synapses" segmentId="3938" fractionAlong="0.516208173623192"/>
            <input id="96" target="../HL23PYR_pop_397/0/HL23PYR_397" destination="synapses" segmentId="4371" fractionAlong="0.990298519967635"/>
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        </inputList>
        <inputList id="Gfluct_9" population="HL23PYR_pop_397" component="Gfluct_HL23PYR_0_9">
            <input id="107" target="../HL23PYR_pop_397/0/HL23PYR_397" destination="synapses" segmentId="2813" fractionAlong="0.971705983774493"/>
            <input id="108" target="../HL23PYR_pop_397/0/HL23PYR_397" destination="synapses" segmentId="4551" fractionAlong="0.824427134963368"/>
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        </inputList>
        <inputList id="Gfluct_10" population="HL23PYR_pop_794" component="Gfluct_HL23PYR_0_5">
            <input id="114" target="../HL23PYR_pop_794/0/HL23PYR_794" destination="synapses" segmentId="905" fractionAlong="0.885114796445408"/>
            <input id="115" target="../HL23PYR_pop_794/0/HL23PYR_794" destination="synapses" segmentId="1205" fractionAlong="0.851171143911959"/>
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        </inputList>
        <inputList id="Gfluct_11" population="HL23PYR_pop_794" component="Gfluct_HL23PYR_0_1">
            <input id="132" target="../HL23PYR_pop_794/0/HL23PYR_794" destination="synapses" segmentId="5626" fractionAlong="0.9431395536055"/>
            <input id="133" target="../HL23PYR_pop_794/0/HL23PYR_794" destination="synapses" segmentId="2132" fractionAlong="0.953249395378716"/>
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        </inputList>
        <inputList id="Gfluct_12" population="HL23PYR_pop_794" component="Gfluct_HL23PYR_0_3">
            <input id="141" target="../HL23PYR_pop_794/0/HL23PYR_794" destination="synapses" segmentId="2316" fractionAlong="0.982179433270446"/>
            <input id="142" target="../HL23PYR_pop_794/0/HL23PYR_794" destination="synapses" segmentId="4965" fractionAlong="0.919038444753989"/>
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        </inputList>
        <inputList id="Gfluct_13" population="HL23PYR_pop_794" component="Gfluct_HL23PYR_0_7">
            <input id="152" target="../HL23PYR_pop_794/0/HL23PYR_794" destination="synapses" segmentId="3938" fractionAlong="0.516208173623192"/>
            <input id="153" target="../HL23PYR_pop_794/0/HL23PYR_794" destination="synapses" segmentId="4371" fractionAlong="0.990298519967635"/>
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        </inputList>
        <inputList id="Gfluct_14" population="HL23PYR_pop_794" component="Gfluct_HL23PYR_0_9">
            <input id="164" target="../HL23PYR_pop_794/0/HL23PYR_794" destination="synapses" segmentId="2813" fractionAlong="0.971705983774493"/>
            <input id="165" target="../HL23PYR_pop_794/0/HL23PYR_794" destination="synapses" segmentId="4551" fractionAlong="0.824427134963368"/>
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        </inputList>
        <inputList id="Gfluct_15" population="HL23PYR_pop_388" component="Gfluct_HL23PYR_0_5">
            <input id="171" target="../HL23PYR_pop_388/0/HL23PYR_388" destination="synapses" segmentId="905" fractionAlong="0.885114796445408"/>
            <input id="172" target="../HL23PYR_pop_388/0/HL23PYR_388" destination="synapses" segmentId="1205" fractionAlong="0.851171143911959"/>
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        </inputList>
        <inputList id="Gfluct_16" population="HL23PYR_pop_388" component="Gfluct_HL23PYR_0_1">
            <input id="189" target="../HL23PYR_pop_388/0/HL23PYR_388" destination="synapses" segmentId="5626" fractionAlong="0.9431395536055"/>
            <input id="190" target="../HL23PYR_pop_388/0/HL23PYR_388" destination="synapses" segmentId="2132" fractionAlong="0.953249395378716"/>
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        </inputList>
        <inputList id="Gfluct_17" population="HL23PYR_pop_388" component="Gfluct_HL23PYR_0_3">
            <input id="198" target="../HL23PYR_pop_388/0/HL23PYR_388" destination="synapses" segmentId="2316" fractionAlong="0.982179433270446"/>
            <input id="199" target="../HL23PYR_pop_388/0/HL23PYR_388" destination="synapses" segmentId="4965" fractionAlong="0.919038444753989"/>
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        </inputList>
        <inputList id="Gfluct_18" population="HL23PYR_pop_388" component="Gfluct_HL23PYR_0_7">
            <input id="209" target="../HL23PYR_pop_388/0/HL23PYR_388" destination="synapses" segmentId="3938" fractionAlong="0.516208173623192"/>
            <input id="210" target="../HL23PYR_pop_388/0/HL23PYR_388" destination="synapses" segmentId="4371" fractionAlong="0.990298519967635"/>
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        </inputList>
        <inputList id="Gfluct_19" population="HL23PYR_pop_388" component="Gfluct_HL23PYR_0_9">
            <input id="221" target="../HL23PYR_pop_388/0/HL23PYR_388" destination="synapses" segmentId="2813" fractionAlong="0.971705983774493"/>
            <input id="222" target="../HL23PYR_pop_388/0/HL23PYR_388" destination="synapses" segmentId="4551" fractionAlong="0.824427134963368"/>
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        </inputList>
        <inputList id="Gfluct_20" population="HL23PYR_pop_785" component="Gfluct_HL23PYR_0_5">
            <input id="228" target="../HL23PYR_pop_785/0/HL23PYR_785" destination="synapses" segmentId="905" fractionAlong="0.885114796445408"/>
            <input id="229" target="../HL23PYR_pop_785/0/HL23PYR_785" destination="synapses" segmentId="1205" fractionAlong="0.851171143911959"/>
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        </inputList>
        <inputList id="Gfluct_21" population="HL23PYR_pop_785" component="Gfluct_HL23PYR_0_1">
            <input id="246" target="../HL23PYR_pop_785/0/HL23PYR_785" destination="synapses" segmentId="5626" fractionAlong="0.9431395536055"/>
            <input id="247" target="../HL23PYR_pop_785/0/HL23PYR_785" destination="synapses" segmentId="2132" fractionAlong="0.953249395378716"/>
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        </inputList>
        <inputList id="Gfluct_22" population="HL23PYR_pop_785" component="Gfluct_HL23PYR_0_3">
            <input id="255" target="../HL23PYR_pop_785/0/HL23PYR_785" destination="synapses" segmentId="2316" fractionAlong="0.982179433270446"/>
            <input id="256" target="../HL23PYR_pop_785/0/HL23PYR_785" destination="synapses" segmentId="4965" fractionAlong="0.919038444753989"/>
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        </inputList>
        <inputList id="Gfluct_23" population="HL23PYR_pop_785" component="Gfluct_HL23PYR_0_7">
            <input id="266" target="../HL23PYR_pop_785/0/HL23PYR_785" destination="synapses" segmentId="3938" fractionAlong="0.516208173623192"/>
            <input id="267" target="../HL23PYR_pop_785/0/HL23PYR_785" destination="synapses" segmentId="4371" fractionAlong="0.990298519967635"/>
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        </inputList>
        <inputList id="Gfluct_24" population="HL23PYR_pop_785" component="Gfluct_HL23PYR_0_9">
            <input id="278" target="../HL23PYR_pop_785/0/HL23PYR_785" destination="synapses" segmentId="2813" fractionAlong="0.971705983774493"/>
            <input id="279" target="../HL23PYR_pop_785/0/HL23PYR_785" destination="synapses" segmentId="4551" fractionAlong="0.824427134963368"/>
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        </inputList>
        <inputList id="Gfluct_25" population="HL23PYR_pop_379" component="Gfluct_HL23PYR_0_5">
            <input id="285" target="../HL23PYR_pop_379/0/HL23PYR_379" destination="synapses" segmentId="905" fractionAlong="0.885114796445408"/>
            <input id="286" target="../HL23PYR_pop_379/0/HL23PYR_379" destination="synapses" segmentId="1205" fractionAlong="0.851171143911959"/>
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        </inputList>
        <inputList id="Gfluct_26" population="HL23PYR_pop_379" component="Gfluct_HL23PYR_0_1">
            <input id="303" target="../HL23PYR_pop_379/0/HL23PYR_379" destination="synapses" segmentId="5626" fractionAlong="0.9431395536055"/>
            <input id="304" target="../HL23PYR_pop_379/0/HL23PYR_379" destination="synapses" segmentId="2132" fractionAlong="0.953249395378716"/>
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        </inputList>
        <inputList id="Gfluct_27" population="HL23PYR_pop_379" component="Gfluct_HL23PYR_0_3">
            <input id="312" target="../HL23PYR_pop_379/0/HL23PYR_379" destination="synapses" segmentId="2316" fractionAlong="0.982179433270446"/>
            <input id="313" target="../HL23PYR_pop_379/0/HL23PYR_379" destination="synapses" segmentId="4965" fractionAlong="0.919038444753989"/>
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        </inputList>
        <inputList id="Gfluct_28" population="HL23PYR_pop_379" component="Gfluct_HL23PYR_0_7">
            <input id="323" target="../HL23PYR_pop_379/0/HL23PYR_379" destination="synapses" segmentId="3938" fractionAlong="0.516208173623192"/>
            <input id="324" target="../HL23PYR_pop_379/0/HL23PYR_379" destination="synapses" segmentId="4371" fractionAlong="0.990298519967635"/>
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        </inputList>
        <inputList id="Gfluct_29" population="HL23PYR_pop_379" component="Gfluct_HL23PYR_0_9">
            <input id="335" target="../HL23PYR_pop_379/0/HL23PYR_379" destination="synapses" segmentId="2813" fractionAlong="0.971705983774493"/>
            <input id="336" target="../HL23PYR_pop_379/0/HL23PYR_379" destination="synapses" segmentId="4551" fractionAlong="0.824427134963368"/>
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        </inputList>
        <inputList id="Gfluct_30" population="HL23PYR_pop_776" component="Gfluct_HL23PYR_0_5">
            <input id="342" target="../HL23PYR_pop_776/0/HL23PYR_776" destination="synapses" segmentId="905" fractionAlong="0.885114796445408"/>
            <input id="343" target="../HL23PYR_pop_776/0/HL23PYR_776" destination="synapses" segmentId="1205" fractionAlong="0.851171143911959"/>
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        </inputList>
        <inputList id="Gfluct_31" population="HL23PYR_pop_776" component="Gfluct_HL23PYR_0_1">
            <input id="360" target="../HL23PYR_pop_776/0/HL23PYR_776" destination="synapses" segmentId="5626" fractionAlong="0.9431395536055"/>
            <input id="361" target="../HL23PYR_pop_776/0/HL23PYR_776" destination="synapses" segmentId="2132" fractionAlong="0.953249395378716"/>
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        </inputList>
        <inputList id="Gfluct_32" population="HL23PYR_pop_776" component="Gfluct_HL23PYR_0_3">
            <input id="369" target="../HL23PYR_pop_776/0/HL23PYR_776" destination="synapses" segmentId="2316" fractionAlong="0.982179433270446"/>
            <input id="370" target="../HL23PYR_pop_776/0/HL23PYR_776" destination="synapses" segmentId="4965" fractionAlong="0.919038444753989"/>
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        </inputList>
        <inputList id="Gfluct_33" population="HL23PYR_pop_776" component="Gfluct_HL23PYR_0_7">
            <input id="380" target="../HL23PYR_pop_776/0/HL23PYR_776" destination="synapses" segmentId="3938" fractionAlong="0.516208173623192"/>
            <input id="381" target="../HL23PYR_pop_776/0/HL23PYR_776" destination="synapses" segmentId="4371" fractionAlong="0.990298519967635"/>
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        </inputList>
        <inputList id="Gfluct_34" population="HL23PYR_pop_776" component="Gfluct_HL23PYR_0_9">
            <input id="392" target="../HL23PYR_pop_776/0/HL23PYR_776" destination="synapses" segmentId="2813" fractionAlong="0.971705983774493"/>
            <input id="393" target="../HL23PYR_pop_776/0/HL23PYR_776" destination="synapses" segmentId="4551" fractionAlong="0.824427134963368"/>
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        </inputList>
        <inputList id="Gfluct_35" population="HL23PYR_pop_394" component="Gfluct_HL23PYR_0_5">
            <input id="399" target="../HL23PYR_pop_394/0/HL23PYR_394" destination="synapses" segmentId="905" fractionAlong="0.885114796445408"/>
            <input id="400" target="../HL23PYR_pop_394/0/HL23PYR_394" destination="synapses" segmentId="1205" fractionAlong="0.851171143911959"/>
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        </inputList>
        <inputList id="Gfluct_36" population="HL23PYR_pop_394" component="Gfluct_HL23PYR_0_1">
            <input id="417" target="../HL23PYR_pop_394/0/HL23PYR_394" destination="synapses" segmentId="5626" fractionAlong="0.9431395536055"/>
            <input id="418" target="../HL23PYR_pop_394/0/HL23PYR_394" destination="synapses" segmentId="2132" fractionAlong="0.953249395378716"/>
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        </inputList>
        <inputList id="Gfluct_37" population="HL23PYR_pop_394" component="Gfluct_HL23PYR_0_3">
            <input id="426" target="../HL23PYR_pop_394/0/HL23PYR_394" destination="synapses" segmentId="2316" fractionAlong="0.982179433270446"/>
            <input id="427" target="../HL23PYR_pop_394/0/HL23PYR_394" destination="synapses" segmentId="4965" fractionAlong="0.919038444753989"/>
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        </inputList>
        <inputList id="Gfluct_38" population="HL23PYR_pop_394" component="Gfluct_HL23PYR_0_7">
            <input id="437" target="../HL23PYR_pop_394/0/HL23PYR_394" destination="synapses" segmentId="3938" fractionAlong="0.516208173623192"/>
            <input id="438" target="../HL23PYR_pop_394/0/HL23PYR_394" destination="synapses" segmentId="4371" fractionAlong="0.990298519967635"/>
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        </inputList>
        <inputList id="Gfluct_39" population="HL23PYR_pop_394" component="Gfluct_HL23PYR_0_9">
            <input id="449" target="../HL23PYR_pop_394/0/HL23PYR_394" destination="synapses" segmentId="2813" fractionAlong="0.971705983774493"/>
            <input id="450" target="../HL23PYR_pop_394/0/HL23PYR_394" destination="synapses" segmentId="4551" fractionAlong="0.824427134963368"/>
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        </inputList>
        <inputList id="Gfluct_40" population="HL23SST_pop_804" component="Gfluct_HL23SST_0_5">
            <input id="456" target="../HL23SST_pop_804/0/HL23SST_804" destination="synapses" segmentId="2955" fractionAlong="0.992363905920124"/>
            <input id="457" target="../HL23SST_pop_804/0/HL23SST_804" destination="synapses" segmentId="3013" fractionAlong="0.926913586159216"/>
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        </inputList>
        <inputList id="Gfluct_41" population="HL23SST_pop_816" component="Gfluct_HL23SST_0_5">
            <input id="476" target="../HL23SST_pop_816/0/HL23SST_816" destination="synapses" segmentId="2955" fractionAlong="0.992363905920124"/>
            <input id="477" target="../HL23SST_pop_816/0/HL23SST_816" destination="synapses" segmentId="3013" fractionAlong="0.926913586159216"/>
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        </inputList>
        <inputList id="Gfluct_42" population="HL23PV_pop_852" component="Gfluct_HL23PV_0_5">
            <input id="496" target="../HL23PV_pop_852/0/HL23PV_852" destination="synapses" segmentId="1836" fractionAlong="0.991164515108885"/>
            <input id="497" target="../HL23PV_pop_852/0/HL23PV_852" destination="synapses" segmentId="3272" fractionAlong="0.937324870527937"/>
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        </inputList>
        <inputList id="Gfluct_43" population="HL23PV_pop_864" component="Gfluct_HL23PV_0_5">
            <input id="507" target="../HL23PV_pop_864/0/HL23PV_864" destination="synapses" segmentId="1836" fractionAlong="0.991164515108885"/>
            <input id="508" target="../HL23PV_pop_864/0/HL23PV_864" destination="synapses" segmentId="3272" fractionAlong="0.937324870527937"/>
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        </inputList>
        <inputList id="Gfluct_44" population="HL23VIP_pop_924" component="Gfluct_HL23VIP_0_5">
            <input id="518" target="../HL23VIP_pop_924/0/HL23VIP_924" destination="synapses" segmentId="1218" fractionAlong="0.98143834656655"/>
            <input id="519" target="../HL23VIP_pop_924/0/HL23VIP_924" destination="synapses" segmentId="2340" fractionAlong="0.865477716974497"/>
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        </inputList>
        <inputList id="Gfluct_45" population="HL23VIP_pop_936" component="Gfluct_HL23VIP_0_5">
            <input id="534" target="../HL23VIP_pop_936/0/HL23VIP_936" destination="synapses" segmentId="1218" fractionAlong="0.98143834656655"/>
            <input id="535" target="../HL23VIP_pop_936/0/HL23VIP_936" destination="synapses" segmentId="2340" fractionAlong="0.865477716974497"/>
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        </inputList>
    </network>
</neuroml>
