<Lems>

    <!--

        This LEMS file has been automatically generated using PyNeuroML v1.1.9 (libNeuroML v0.5.6)

     -->

    <!-- Specify which component to run -->
    <Target component="HL23Sim_0.05"/>

    <!-- Include core NeuroML2 ComponentType definitions -->
    <Include file="Cells.xml"/>
    <Include file="Networks.xml"/>
    <Include file="Simulation.xml"/>

    <Include file="HL23Net_0.05.net.nml"/>
    <Include file="rotated_cells/HL23PYR_sim.cell.nml"/>
    <Include file="rotated_cells/HL23SST_sim.cell.nml"/>
    <Include file="rotated_cells/HL23PV_sim.cell.nml"/>
    <Include file="rotated_cells/HL23VIP_sim.cell.nml"/>
    <Include file="lems_components_0.05.xml"/>

    <Simulation id="HL23Sim_0.05" length="1000.0ms" step="0.025ms" target="HL23Network" seed="123">  <!-- Note seed: ensures same random numbers used every run -->
        <OutputFile id="output1" fileName="HL23Net_0.05.v.dat">
            <OutputColumn id="HL23PYR_pop_0" quantity="HL23PYR_pop/0/HL23PYR_sim/0/v"/>
            <OutputColumn id="HL23PYR_pop_1" quantity="HL23PYR_pop/1/HL23PYR_sim/0/v"/>
            <OutputColumn id="HL23PYR_pop_2" quantity="HL23PYR_pop/2/HL23PYR_sim/0/v"/>
            <OutputColumn id="HL23PYR_pop_3" quantity="HL23PYR_pop/3/HL23PYR_sim/0/v"/>
            <OutputColumn id="HL23PYR_pop_4" quantity="HL23PYR_pop/4/HL23PYR_sim/0/v"/>
            <OutputColumn id="HL23PYR_pop_5" quantity="HL23PYR_pop/5/HL23PYR_sim/0/v"/>
            <OutputColumn id="HL23PYR_pop_6" quantity="HL23PYR_pop/6/HL23PYR_sim/0/v"/>
            <OutputColumn id="HL23PYR_pop_7" quantity="HL23PYR_pop/7/HL23PYR_sim/0/v"/>
            <OutputColumn id="HL23PYR_pop_8" quantity="HL23PYR_pop/8/HL23PYR_sim/0/v"/>
            <OutputColumn id="HL23PYR_pop_9" quantity="HL23PYR_pop/9/HL23PYR_sim/0/v"/>
            <OutputColumn id="HL23PYR_pop_10" quantity="HL23PYR_pop/10/HL23PYR_sim/0/v"/>
            <OutputColumn id="HL23PYR_pop_11" quantity="HL23PYR_pop/11/HL23PYR_sim/0/v"/>
            <OutputColumn id="HL23PYR_pop_12" quantity="HL23PYR_pop/12/HL23PYR_sim/0/v"/>
            <OutputColumn id="HL23PYR_pop_13" quantity="HL23PYR_pop/13/HL23PYR_sim/0/v"/>
            <OutputColumn id="HL23PYR_pop_14" quantity="HL23PYR_pop/14/HL23PYR_sim/0/v"/>
            <OutputColumn id="HL23PYR_pop_15" quantity="HL23PYR_pop/15/HL23PYR_sim/0/v"/>
            <OutputColumn id="HL23PYR_pop_16" quantity="HL23PYR_pop/16/HL23PYR_sim/0/v"/>
            <OutputColumn id="HL23PYR_pop_17" quantity="HL23PYR_pop/17/HL23PYR_sim/0/v"/>
            <OutputColumn id="HL23PYR_pop_18" quantity="HL23PYR_pop/18/HL23PYR_sim/0/v"/>
            <OutputColumn id="HL23PYR_pop_19" quantity="HL23PYR_pop/19/HL23PYR_sim/0/v"/>
            <OutputColumn id="HL23PYR_pop_20" quantity="HL23PYR_pop/20/HL23PYR_sim/0/v"/>
            <OutputColumn id="HL23PYR_pop_21" quantity="HL23PYR_pop/21/HL23PYR_sim/0/v"/>
            <OutputColumn id="HL23PYR_pop_22" quantity="HL23PYR_pop/22/HL23PYR_sim/0/v"/>
            <OutputColumn id="HL23PYR_pop_23" quantity="HL23PYR_pop/23/HL23PYR_sim/0/v"/>
            <OutputColumn id="HL23PYR_pop_24" quantity="HL23PYR_pop/24/HL23PYR_sim/0/v"/>
            <OutputColumn id="HL23PYR_pop_25" quantity="HL23PYR_pop/25/HL23PYR_sim/0/v"/>
            <OutputColumn id="HL23PYR_pop_26" quantity="HL23PYR_pop/26/HL23PYR_sim/0/v"/>
            <OutputColumn id="HL23PYR_pop_27" quantity="HL23PYR_pop/27/HL23PYR_sim/0/v"/>
            <OutputColumn id="HL23PYR_pop_28" quantity="HL23PYR_pop/28/HL23PYR_sim/0/v"/>
            <OutputColumn id="HL23PYR_pop_29" quantity="HL23PYR_pop/29/HL23PYR_sim/0/v"/>
            <OutputColumn id="HL23PYR_pop_30" quantity="HL23PYR_pop/30/HL23PYR_sim/0/v"/>
            <OutputColumn id="HL23PYR_pop_31" quantity="HL23PYR_pop/31/HL23PYR_sim/0/v"/>
            <OutputColumn id="HL23PYR_pop_32" quantity="HL23PYR_pop/32/HL23PYR_sim/0/v"/>
            <OutputColumn id="HL23PYR_pop_33" quantity="HL23PYR_pop/33/HL23PYR_sim/0/v"/>
            <OutputColumn id="HL23PYR_pop_34" quantity="HL23PYR_pop/34/HL23PYR_sim/0/v"/>
            <OutputColumn id="HL23PYR_pop_35" quantity="HL23PYR_pop/35/HL23PYR_sim/0/v"/>
            <OutputColumn id="HL23PYR_pop_36" quantity="HL23PYR_pop/36/HL23PYR_sim/0/v"/>
            <OutputColumn id="HL23PYR_pop_37" quantity="HL23PYR_pop/37/HL23PYR_sim/0/v"/>
            <OutputColumn id="HL23PYR_pop_38" quantity="HL23PYR_pop/38/HL23PYR_sim/0/v"/>
            <OutputColumn id="HL23PYR_pop_39" quantity="HL23PYR_pop/39/HL23PYR_sim/0/v"/>
            <OutputColumn id="HL23SST_pop_0" quantity="HL23SST_pop/0/HL23SST_sim/0/v"/>
            <OutputColumn id="HL23SST_pop_1" quantity="HL23SST_pop/1/HL23SST_sim/0/v"/>
            <OutputColumn id="HL23SST_pop_2" quantity="HL23SST_pop/2/HL23SST_sim/0/v"/>
            <OutputColumn id="HL23PV_pop_0" quantity="HL23PV_pop/0/HL23PV_sim/0/v"/>
            <OutputColumn id="HL23PV_pop_1" quantity="HL23PV_pop/1/HL23PV_sim/0/v"/>
            <OutputColumn id="HL23PV_pop_2" quantity="HL23PV_pop/2/HL23PV_sim/0/v"/>
            <OutputColumn id="HL23PV_pop_3" quantity="HL23PV_pop/3/HL23PV_sim/0/v"/>
            <OutputColumn id="HL23VIP_pop_0" quantity="HL23VIP_pop/0/HL23VIP_sim/0/v"/>
            <OutputColumn id="HL23VIP_pop_1" quantity="HL23VIP_pop/1/HL23VIP_sim/0/v"/>
            <OutputColumn id="HL23VIP_pop_2" quantity="HL23VIP_pop/2/HL23VIP_sim/0/v"/>
            <OutputColumn id="HL23VIP_pop_3" quantity="HL23VIP_pop/3/HL23VIP_sim/0/v"/>
        </OutputFile>

    </Simulation>

</Lems>
