<Lems>

    <!--

        This LEMS file has been automatically generated using PyNeuroML v1.1.8 (libNeuroML v0.5.6)

     -->

    <!-- Specify which component to run -->
    <Target component="HL23Sim_0.1"/>

    <!-- Include core NeuroML2 ComponentType definitions -->
    <Include file="Cells.xml"/>
    <Include file="Networks.xml"/>
    <Include file="Simulation.xml"/>

    <Include file="HL23Net_0.1.net.nml"/>
    <Include file="rotated_cells/HL23PYR_sim.cell.nml"/>
    <Include file="rotated_cells/HL23SST_sim.cell.nml"/>
    <Include file="rotated_cells/HL23PV_sim.cell.nml"/>
    <Include file="rotated_cells/HL23VIP_sim.cell.nml"/>
    <Include file="lems_components_0.1.xml"/>

    <Simulation id="HL23Sim_0.1" length="1000.0ms" step="0.025ms" target="HL23Network" seed="123">  <!-- Note seed: ensures same random numbers used every run -->
        <OutputFile id="output1" fileName="HL23Net_0.1.v.dat">
            <OutputColumn id="HL23PYR_pop_0" quantity="HL23PYR_pop/0/HL23PYR_sim/0/v"/>
            <OutputColumn id="HL23PYR_pop_1" quantity="HL23PYR_pop/1/HL23PYR_sim/0/v"/>
            <OutputColumn id="HL23PYR_pop_2" quantity="HL23PYR_pop/2/HL23PYR_sim/0/v"/>
            <OutputColumn id="HL23PYR_pop_3" quantity="HL23PYR_pop/3/HL23PYR_sim/0/v"/>
            <OutputColumn id="HL23PYR_pop_4" quantity="HL23PYR_pop/4/HL23PYR_sim/0/v"/>
            <OutputColumn id="HL23PYR_pop_5" quantity="HL23PYR_pop/5/HL23PYR_sim/0/v"/>
            <OutputColumn id="HL23PYR_pop_6" quantity="HL23PYR_pop/6/HL23PYR_sim/0/v"/>
            <OutputColumn id="HL23PYR_pop_7" quantity="HL23PYR_pop/7/HL23PYR_sim/0/v"/>
            <OutputColumn id="HL23PYR_pop_8" quantity="HL23PYR_pop/8/HL23PYR_sim/0/v"/>
            <OutputColumn id="HL23PYR_pop_9" quantity="HL23PYR_pop/9/HL23PYR_sim/0/v"/>
            <OutputColumn id="HL23PYR_pop_10" quantity="HL23PYR_pop/10/HL23PYR_sim/0/v"/>
            <OutputColumn id="HL23PYR_pop_11" quantity="HL23PYR_pop/11/HL23PYR_sim/0/v"/>
            <OutputColumn id="HL23PYR_pop_12" quantity="HL23PYR_pop/12/HL23PYR_sim/0/v"/>
            <OutputColumn id="HL23PYR_pop_13" quantity="HL23PYR_pop/13/HL23PYR_sim/0/v"/>
            <OutputColumn id="HL23PYR_pop_14" quantity="HL23PYR_pop/14/HL23PYR_sim/0/v"/>
            <OutputColumn id="HL23PYR_pop_15" quantity="HL23PYR_pop/15/HL23PYR_sim/0/v"/>
            <OutputColumn id="HL23PYR_pop_16" quantity="HL23PYR_pop/16/HL23PYR_sim/0/v"/>
            <OutputColumn id="HL23PYR_pop_17" quantity="HL23PYR_pop/17/HL23PYR_sim/0/v"/>
            <OutputColumn id="HL23PYR_pop_18" quantity="HL23PYR_pop/18/HL23PYR_sim/0/v"/>
            <OutputColumn id="HL23PYR_pop_19" quantity="HL23PYR_pop/19/HL23PYR_sim/0/v"/>
            <OutputColumn id="HL23PYR_pop_20" quantity="HL23PYR_pop/20/HL23PYR_sim/0/v"/>
            <OutputColumn id="HL23PYR_pop_21" quantity="HL23PYR_pop/21/HL23PYR_sim/0/v"/>
            <OutputColumn id="HL23PYR_pop_22" quantity="HL23PYR_pop/22/HL23PYR_sim/0/v"/>
            <OutputColumn id="HL23PYR_pop_23" quantity="HL23PYR_pop/23/HL23PYR_sim/0/v"/>
            <OutputColumn id="HL23PYR_pop_24" quantity="HL23PYR_pop/24/HL23PYR_sim/0/v"/>
            <OutputColumn id="HL23PYR_pop_25" quantity="HL23PYR_pop/25/HL23PYR_sim/0/v"/>
            <OutputColumn id="HL23PYR_pop_26" quantity="HL23PYR_pop/26/HL23PYR_sim/0/v"/>
            <OutputColumn id="HL23PYR_pop_27" quantity="HL23PYR_pop/27/HL23PYR_sim/0/v"/>
            <OutputColumn id="HL23PYR_pop_28" quantity="HL23PYR_pop/28/HL23PYR_sim/0/v"/>
            <OutputColumn id="HL23PYR_pop_29" quantity="HL23PYR_pop/29/HL23PYR_sim/0/v"/>
            <OutputColumn id="HL23PYR_pop_30" quantity="HL23PYR_pop/30/HL23PYR_sim/0/v"/>
            <OutputColumn id="HL23PYR_pop_31" quantity="HL23PYR_pop/31/HL23PYR_sim/0/v"/>
            <OutputColumn id="HL23PYR_pop_32" quantity="HL23PYR_pop/32/HL23PYR_sim/0/v"/>
            <OutputColumn id="HL23PYR_pop_33" quantity="HL23PYR_pop/33/HL23PYR_sim/0/v"/>
            <OutputColumn id="HL23PYR_pop_34" quantity="HL23PYR_pop/34/HL23PYR_sim/0/v"/>
            <OutputColumn id="HL23PYR_pop_35" quantity="HL23PYR_pop/35/HL23PYR_sim/0/v"/>
            <OutputColumn id="HL23PYR_pop_36" quantity="HL23PYR_pop/36/HL23PYR_sim/0/v"/>
            <OutputColumn id="HL23PYR_pop_37" quantity="HL23PYR_pop/37/HL23PYR_sim/0/v"/>
            <OutputColumn id="HL23PYR_pop_38" quantity="HL23PYR_pop/38/HL23PYR_sim/0/v"/>
            <OutputColumn id="HL23PYR_pop_39" quantity="HL23PYR_pop/39/HL23PYR_sim/0/v"/>
            <OutputColumn id="HL23PYR_pop_40" quantity="HL23PYR_pop/40/HL23PYR_sim/0/v"/>
            <OutputColumn id="HL23PYR_pop_41" quantity="HL23PYR_pop/41/HL23PYR_sim/0/v"/>
            <OutputColumn id="HL23PYR_pop_42" quantity="HL23PYR_pop/42/HL23PYR_sim/0/v"/>
            <OutputColumn id="HL23PYR_pop_43" quantity="HL23PYR_pop/43/HL23PYR_sim/0/v"/>
            <OutputColumn id="HL23PYR_pop_44" quantity="HL23PYR_pop/44/HL23PYR_sim/0/v"/>
            <OutputColumn id="HL23PYR_pop_45" quantity="HL23PYR_pop/45/HL23PYR_sim/0/v"/>
            <OutputColumn id="HL23PYR_pop_46" quantity="HL23PYR_pop/46/HL23PYR_sim/0/v"/>
            <OutputColumn id="HL23PYR_pop_47" quantity="HL23PYR_pop/47/HL23PYR_sim/0/v"/>
            <OutputColumn id="HL23PYR_pop_48" quantity="HL23PYR_pop/48/HL23PYR_sim/0/v"/>
            <OutputColumn id="HL23PYR_pop_49" quantity="HL23PYR_pop/49/HL23PYR_sim/0/v"/>
            <OutputColumn id="HL23PYR_pop_50" quantity="HL23PYR_pop/50/HL23PYR_sim/0/v"/>
            <OutputColumn id="HL23PYR_pop_51" quantity="HL23PYR_pop/51/HL23PYR_sim/0/v"/>
            <OutputColumn id="HL23PYR_pop_52" quantity="HL23PYR_pop/52/HL23PYR_sim/0/v"/>
            <OutputColumn id="HL23PYR_pop_53" quantity="HL23PYR_pop/53/HL23PYR_sim/0/v"/>
            <OutputColumn id="HL23PYR_pop_54" quantity="HL23PYR_pop/54/HL23PYR_sim/0/v"/>
            <OutputColumn id="HL23PYR_pop_55" quantity="HL23PYR_pop/55/HL23PYR_sim/0/v"/>
            <OutputColumn id="HL23PYR_pop_56" quantity="HL23PYR_pop/56/HL23PYR_sim/0/v"/>
            <OutputColumn id="HL23PYR_pop_57" quantity="HL23PYR_pop/57/HL23PYR_sim/0/v"/>
            <OutputColumn id="HL23PYR_pop_58" quantity="HL23PYR_pop/58/HL23PYR_sim/0/v"/>
            <OutputColumn id="HL23PYR_pop_59" quantity="HL23PYR_pop/59/HL23PYR_sim/0/v"/>
            <OutputColumn id="HL23PYR_pop_60" quantity="HL23PYR_pop/60/HL23PYR_sim/0/v"/>
            <OutputColumn id="HL23PYR_pop_61" quantity="HL23PYR_pop/61/HL23PYR_sim/0/v"/>
            <OutputColumn id="HL23PYR_pop_62" quantity="HL23PYR_pop/62/HL23PYR_sim/0/v"/>
            <OutputColumn id="HL23PYR_pop_63" quantity="HL23PYR_pop/63/HL23PYR_sim/0/v"/>
            <OutputColumn id="HL23PYR_pop_64" quantity="HL23PYR_pop/64/HL23PYR_sim/0/v"/>
            <OutputColumn id="HL23PYR_pop_65" quantity="HL23PYR_pop/65/HL23PYR_sim/0/v"/>
            <OutputColumn id="HL23PYR_pop_66" quantity="HL23PYR_pop/66/HL23PYR_sim/0/v"/>
            <OutputColumn id="HL23PYR_pop_67" quantity="HL23PYR_pop/67/HL23PYR_sim/0/v"/>
            <OutputColumn id="HL23PYR_pop_68" quantity="HL23PYR_pop/68/HL23PYR_sim/0/v"/>
            <OutputColumn id="HL23PYR_pop_69" quantity="HL23PYR_pop/69/HL23PYR_sim/0/v"/>
            <OutputColumn id="HL23PYR_pop_70" quantity="HL23PYR_pop/70/HL23PYR_sim/0/v"/>
            <OutputColumn id="HL23PYR_pop_71" quantity="HL23PYR_pop/71/HL23PYR_sim/0/v"/>
            <OutputColumn id="HL23PYR_pop_72" quantity="HL23PYR_pop/72/HL23PYR_sim/0/v"/>
            <OutputColumn id="HL23PYR_pop_73" quantity="HL23PYR_pop/73/HL23PYR_sim/0/v"/>
            <OutputColumn id="HL23PYR_pop_74" quantity="HL23PYR_pop/74/HL23PYR_sim/0/v"/>
            <OutputColumn id="HL23PYR_pop_75" quantity="HL23PYR_pop/75/HL23PYR_sim/0/v"/>
            <OutputColumn id="HL23PYR_pop_76" quantity="HL23PYR_pop/76/HL23PYR_sim/0/v"/>
            <OutputColumn id="HL23PYR_pop_77" quantity="HL23PYR_pop/77/HL23PYR_sim/0/v"/>
            <OutputColumn id="HL23PYR_pop_78" quantity="HL23PYR_pop/78/HL23PYR_sim/0/v"/>
            <OutputColumn id="HL23PYR_pop_79" quantity="HL23PYR_pop/79/HL23PYR_sim/0/v"/>
            <OutputColumn id="HL23SST_pop_0" quantity="HL23SST_pop/0/HL23SST_sim/0/v"/>
            <OutputColumn id="HL23SST_pop_1" quantity="HL23SST_pop/1/HL23SST_sim/0/v"/>
            <OutputColumn id="HL23SST_pop_2" quantity="HL23SST_pop/2/HL23SST_sim/0/v"/>
            <OutputColumn id="HL23SST_pop_3" quantity="HL23SST_pop/3/HL23SST_sim/0/v"/>
            <OutputColumn id="HL23SST_pop_4" quantity="HL23SST_pop/4/HL23SST_sim/0/v"/>
            <OutputColumn id="HL23PV_pop_0" quantity="HL23PV_pop/0/HL23PV_sim/0/v"/>
            <OutputColumn id="HL23PV_pop_1" quantity="HL23PV_pop/1/HL23PV_sim/0/v"/>
            <OutputColumn id="HL23PV_pop_2" quantity="HL23PV_pop/2/HL23PV_sim/0/v"/>
            <OutputColumn id="HL23PV_pop_3" quantity="HL23PV_pop/3/HL23PV_sim/0/v"/>
            <OutputColumn id="HL23PV_pop_4" quantity="HL23PV_pop/4/HL23PV_sim/0/v"/>
            <OutputColumn id="HL23PV_pop_5" quantity="HL23PV_pop/5/HL23PV_sim/0/v"/>
            <OutputColumn id="HL23PV_pop_6" quantity="HL23PV_pop/6/HL23PV_sim/0/v"/>
            <OutputColumn id="HL23VIP_pop_0" quantity="HL23VIP_pop/0/HL23VIP_sim/0/v"/>
            <OutputColumn id="HL23VIP_pop_1" quantity="HL23VIP_pop/1/HL23VIP_sim/0/v"/>
            <OutputColumn id="HL23VIP_pop_2" quantity="HL23VIP_pop/2/HL23VIP_sim/0/v"/>
            <OutputColumn id="HL23VIP_pop_3" quantity="HL23VIP_pop/3/HL23VIP_sim/0/v"/>
            <OutputColumn id="HL23VIP_pop_4" quantity="HL23VIP_pop/4/HL23VIP_sim/0/v"/>
            <OutputColumn id="HL23VIP_pop_5" quantity="HL23VIP_pop/5/HL23VIP_sim/0/v"/>
            <OutputColumn id="HL23VIP_pop_6" quantity="HL23VIP_pop/6/HL23VIP_sim/0/v"/>
            <OutputColumn id="HL23VIP_pop_7" quantity="HL23VIP_pop/7/HL23VIP_sim/0/v"/>
        </OutputFile>

    </Simulation>

</Lems>
