<?xml version="1.0" encoding="UTF-8"?>
<neuroml xmlns="http://www.neuroml.org/schema/neuroml2"
    xmlns:xsi="http://www.w3.org/2001/XMLSchema-instance"
    xsi:schemaLocation="http://www.neuroml.org/schema/neuroml2 https://raw.github.com/NeuroML/NeuroML2/development/Schemas/NeuroML2/NeuroML_v2beta4.xsd"
    id = "NeuroML2_file_exported_from_NEURON">

  <notes> NeuroML 2 file generated from ModelView by: NEURON -- VERSION 8.0.2 (Fedora 37) master (f0ca745418e942ad4763bdc47459c409f0b11512) 2022-07-22
          Authors: Michael Hines, Sushil Kambampati and Padraig Gleeson,
          Yale University and UCL
  </notes>

  <cell id="NeuronTemplate_0_0">
    <notes>Cell: NeuronTemplate_0_0 exported from NEURON ModelView</notes>
    <morphology id="morphology">
<!-- Section: NeuronTemplate[0].soma[0] (segmentGroup: soma_0) which has 3 3D points, so 2 segment(s)-->
      <segment id="0" name = "Seg0_soma_0">
        <proximal x="305.172" y="263.232" z="28.84" diameter="16.9312"/>
        <distal x="313.638" y="263.232" z="28.84" diameter="16.9312"/>
      </segment>
      <segment id="2" name = "Seg1_soma_0">
        <parent segment="0"/>
        <distal x="322.104" y="263.232" z="28.84" diameter="16.9312"/>
      </segment>
<!-- Section: NeuronTemplate[0].dend[46] (segmentGroup: dend_46) which has 17 3D points, so 16 segment(s)-->
      <segment id="2651" name = "Seg0_dend_46">  <!-- Connected at 0.5 on parent section: NeuronTemplate[0].soma[0]  -->
        <parent segment="0"/>
        <proximal x="313.578" y="256.004" z="31.6196" diameter="0.2288"/>
        <distal x="313.7" y="254.871" z="31.423" diameter="0.7032"/>
      </segment>
      <segment id="2652" name = "Seg1_dend_46">
        <parent segment="2651"/>
        <distal x="313.996" y="253.783" z="31.3071" diameter="0.714"/>
      </segment>
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
<!-- Section: NeuronTemplate[0].soma[0] (segmentGroup: soma_0) which has 3 3D points, so 2 segment(s)-->

      <segmentGroup id = "soma_0"  neuroLexId="sao864921383">
         <notes>This group contains an unbranched set of segments, and all of the segmentGroups marked with
             neuroLexId = sao864921383 form a non-overlapping set of all of the segments.
             These segmentGroups correspond to the 'cables' of NeuroML v1.8.1, and map to/from NEURON sections.</notes>
        <member segment = "0"/>
        <member segment = "2"/>
      </segmentGroup>

<!-- Section: NeuronTemplate[0].dend[46] (segmentGroup: dend_46) which has 17 3D points, so 16 segment(s)-->

      <segmentGroup id = "dend_46"  neuroLexId="sao864921383">
         <notes>This group contains an unbranched set of segments, and all of the segmentGroups marked with
             neuroLexId = sao864921383 form a non-overlapping set of all of the segments.
             These segmentGroups correspond to the 'cables' of NeuroML v1.8.1, and map to/from NEURON sections.</notes>
        <member segment = "2651"/>
        <member segment = "2652"/>
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      </segmentGroup>

<!-- Section: NeuronTemplate[0].dend[17] (segmentGroup: dend_17) which has 11 3D points, so 10 segment(s)-->

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
    </morphology>
  </cell>

  <network id="network" type="networkWithTemperature" temperature="6 degC">
    <population id="Pop_NeuronTemplate_0_0" component="NeuronTemplate_0_0" size="1" type="populationList">
        <instance id="0">
            <location x="0" y="0" z="0"/>
        </instance>
    </population>
  </network>

</neuroml>
