<Lems>

    <!--

        This LEMS file has been automatically generated using PyNeuroML v1.0.0 (libNeuroML v0.5.0)

     -->

    <!-- Specify which component to run -->
    <Target component="test_probAMPANMDA"/>

    <!-- Include core NeuroML2 ComponentType definitions -->
    <Include file="Cells.xml"/>
    <Include file="Networks.xml"/>
    <Include file="Simulation.xml"/>

    <Include file="testProbAMPANMDA.net.nml"/>
    <Include file="ProbAMPANMDA.synapsedef.nml"/>
    <Include file="ProbAMPANMDA.synapse.nml"/>

    <Simulation id="test_probAMPANMDA" length="1000ms" step="0.1ms" target="TestNet" seed="123">  <!-- Note seed: ensures same random numbers used every run -->

        <OutputFile id="output1" fileName="test_probAMPANMDA.output.dat">
            <OutputColumn id="v" quantity="TestPop[0]/v"/>
            <OutputColumn id="i" quantity="TestPop[0]/i"/>
            <OutputColumn id="i_AMPA" quantity="TestPop[0]/synapses:probAMPANMDASyn:0/i_AMPA"/>
            <OutputColumn id="i_AMPA" quantity="TestPop[0]/synapses:probAMPANMDASyn:0/i_NMDA"/>
            <OutputColumn id="g_AMPA" quantity="TestPop[0]/synapses:probAMPANMDASyn:0/g_AMPA"/>
            <OutputColumn id="g_AMPA" quantity="TestPop[0]/synapses:probAMPANMDASyn:0/g_NMDA"/>
        </OutputFile>

        <EventOutputFile id="output0" fileName="test_probAMPANMDA.spikes.dat" format="ID_TIME">
            <EventSelection id="0" select="TestPop[0]" eventPort="spike"/>
        </EventOutputFile>

    </Simulation>

</Lems>
