<Lems xmlns="http://www.neuroml.org/lems/0.7.6"
      xmlns:xsi="http://www.w3.org/2001/XMLSchema-instance"
      xsi:schemaLocation="http://www.neuroml.org/lems/0.7.6 ../../LEMS/Schemas/LEMS/LEMS_v0.7.6.xsd"
      description="Defines a Component of ProbAMPANMDASyn ComponentType">

    <Include file="ProbAMPANMDA.synapse.nml" />
    <!-- from the mod file -->
    <Component type="ProbAMPANMDASyn" id="probAMPANMDASyn"
        tau_r_AMPA="0.2 ms"
        tau_d_AMPA="1.7 ms"
        tau_r_NMDA="0.29 ms"
        tau_d_NMDA="43 ms"
        Use="1"
        Dep="100 ms"
        Fac="10 ms"
        mg="1 mM"
        gbase="0.001 uS"
        weight_factor_NMDA="1"
        u0="0"
        erev="0 mV"
    />

    <!-- for the model, values from the H5 file -->
    <Component type="ProbAMPANMDASyn" id="HL23PYR_HL23PV_ProbAMPANMDASyn"
        tau_r_AMPA="0.3 ms"
        tau_d_AMPA="3 ms"
        tau_r_NMDA="2 ms"
        tau_d_NMDA="65 ms"
        Use="0.88"
        Dep="510 ms"
        Fac="180 ms"
        mg="1 mM"
        gbase="3.37e-4 uS"
        weight_factor_NMDA="1"
        u0="0"
        erev="0 mV"
    />
    <Component type="ProbAMPANMDASyn" id="HL23PYR_HL23PYR_ProbAMPANMDASyn"
        tau_r_AMPA="0.3 ms"
        tau_d_AMPA="3 ms"
        tau_r_NMDA="2 ms"
        tau_d_NMDA="65 ms"
        Use="0.46"
        Dep="670 ms"
        Fac="17 ms"
        mg="1 mM"
        gbase="2.482e-4 uS"
        weight_factor_NMDA="1"
        u0="0"
        erev="0 mV"
    />
    <Component type="ProbAMPANMDASyn" id="HL23PYR_HL23SST_ProbAMPANMDASyn"
        tau_r_AMPA="0.3 ms"
        tau_d_AMPA="3 ms"
        tau_r_NMDA="2 ms"
        tau_d_NMDA="65 ms"
        Use="0.09"
        Dep="140 ms"
        Fac="670 ms"
        mg="1 mM"
        gbase="3.8e-4 uS"
        weight_factor_NMDA="1"
        u0="0"
        erev="0 mV"
    />
    <Component type="ProbAMPANMDASyn" id="HL23PYR_HL23VIP_ProbAMPANMDASyn"
        tau_r_AMPA="0.3 ms"
        tau_d_AMPA="3 ms"
        tau_r_NMDA="2 ms"
        tau_d_NMDA="65 ms"
        Use="0.5"
        Dep="670 ms"
        Fac="17 ms"
        mg="1 mM"
        gbase="3.1e-4 uS"
        weight_factor_NMDA="1"
        u0="0"
        erev="0 mV"
    />
</Lems>
