<?xml version="1.0" encoding="ISO-8859-1"?>
<neuroml xmlns="http://www.neuroml.org/schema/neuroml2" xmlns:xsi="http://www.w3.org/2001/XMLSchema-instance" xsi:schemaLocation="http://www.neuroml.org/schema/neuroml2 https://raw.github.com/NeuroML/NeuroML2/development/Schemas/NeuroML2/NeuroML_v2.3.xsd" id="ProbAMPANMDASynDoc">

<!-- Note that order of different LEMS types matters for validation, since the schema defines what order they should appear in -->

<!-- docs on NET_RECEIVE and INITIAL blocks: https://www.neuron.yale.edu/neuron/static/py_doc/modelspec/programmatic/network/netcon.html -->

    <ComponentType name="ProbAMPANMDASyn"
        extends="baseConductanceBasedSynapse"
        description="AMPA and NMDA receptor conductance using a dual-exponential profile presynaptic short-term plasticity based on Fuhrmann et al. 2002"
        >

        <Property name="weight" dimension="none" defaultValue="1" />

        <Parameter name="tau_r_AMPA" dimension="time" />
        <Parameter name="tau_d_AMPA" dimension="time" />
        <Parameter name="tau_r_NMDA" dimension="time" />
        <Parameter name="tau_d_NMDA" dimension="time" />

        <Parameter name="Use" dimension="none" />
        <Parameter name="Dep" dimension="time" />
        <Parameter name="Fac" dimension="time" />

        <Parameter name="mg" dimension="concentration" />

        <!-- gmax is defined as gbase, which is inherited from baseConductanceBasedSynapse -->
        <Parameter name="erev" dimension="voltage" />

        <Parameter name="weight_factor_NMDA" dimension="none" />
        <Parameter name="u0" dimension="none"/>

        <DerivedParameter name="tp_AMPA" dimension="none" value="(tau_r_AMPA * tau_d_AMPA) / ((tau_d_AMPA - tau_r_AMPA) * log(tau_d_AMPA / tau_r_AMPA))" />
        <DerivedParameter name="factor_AMPA" dimension="none" value="1 / (-exp(-tp_AMPA / tau_r_AMPA) + exp(-tp_AMPA / tau_d_AMPA))" />

        <DerivedParameter name="tp_NMDA" dimension="none" value="(tau_r_NMDA * tau_d_NMDA) / ((tau_d_NMDA-tau_r_NMDA) * log(tau_d_NMDA / tau_r_NMDA))" />
        <DerivedParameter name="factor_NMDA" dimension="none" value="1 / (-exp(-tp_NMDA / tau_r_NMDA) + exp(-tp_NMDA / tau_d_NMDA))" />

        <Constant name="MVOLT" dimension="voltage" value="1mV"/>
        <Constant name="MSEC" dimension="time" value="1ms"/>
        <Constant name="MMOL" dimension="concentration" value="1mM"/>

        <Exposure name="i_AMPA" dimension="current"/>
        <Exposure name="i_NMDA" dimension="current"/>
        <Exposure name="i" dimension="current"/>

        <Dynamics>
            <StateVariable name="Pv_tmp" dimension="none"/>
            <StateVariable name="Pv" dimension="none"/>
            <StateVariable name="Pr" dimension="none"/>
            <StateVariable name="u" dimension="none"/>
            <StateVariable name="u_every" dimension="none"/>
            <StateVariable name="u1" dimension="none" />
            <StateVariable name="u1_every" dimension="none" />
            <StateVariable name="tsyn" dimension="time"/>
            <StateVariable name="A_AMPA" dimension="none" />
            <StateVariable name="B_AMPA" dimension="none" />
            <StateVariable name="A_NMDA" dimension="none" />
            <StateVariable name="B_NMDA" dimension="none" />

            <DerivedVariable name="mggate" dimension="none" value="1/(1+exp(-0.062 * v/MVOLT) * mg/(3.57 *  MMOL))" />

            <DerivedVariable name="g_AMPA" dimension="conductance" value="gbase * (B_AMPA - A_AMPA)" />
            <DerivedVariable name="g_NMDA" dimension="conductance" value="gbase * (B_NMDA - A_NMDA) * mggate" />
            <DerivedVariable name="g" exposure="g" dimension="conductance" value="g_AMPA + g_NMDA" />

            <DerivedVariable name="i_AMPA" exposure="i_AMPA" dimension="current" value="g_AMPA * (v - erev)" />
            <DerivedVariable name="i_NMDA" exposure="i_NMDA" dimension="current" value="g_NMDA * (v - erev)" />
            <DerivedVariable name="i" exposure="i" dimension="current" value="i_AMPA + i_NMDA" />

            <DerivedVariable name="Pv_tmp" dimension="none" value="(1 - (1 - Pv) * exp(- (t - tsyn ) / Dep))" />
            <DerivedVariable name="Pr" dimension="none" value="u * Pv_tmp" />

            <!-- calculate these at every step, but only assign to the primary variables in the OnEvent block. The OnEvent block does not support OnCondition -->

            <ConditionalDerivedVariable name="u1_every" dimension="none" >
                <Case condition="Fac .gt. 0" value="u_every * exp(-(t - tsyn)/Fac)" />
                <Case value="Use" />
            </ConditionalDerivedVariable>
            <ConditionalDerivedVariable name="u_every" dimension="none" >
                <Case condition="Fac .gt. 0" value="u1_every + Use * (1 - u1_every)" />
            </ConditionalDerivedVariable>

            <TimeDerivative variable="A_AMPA" value="-A_AMPA / tau_r_AMPA" />
            <TimeDerivative variable="B_AMPA" value="-B_AMPA / tau_d_AMPA" />
            <TimeDerivative variable="A_NMDA" value="-A_NMDA / tau_r_NMDA" />
            <TimeDerivative variable="B_NMDA" value="-B_NMDA / tau_d_NMDA" />
            <OnStart>
                <StateAssignment variable="A_AMPA" value="0" />
                <StateAssignment variable="B_AMPA" value="0" />
                <StateAssignment variable="A_NMDA" value="0" />
                <StateAssignment variable="B_NMDA" value="0" />

                <StateAssignment variable="u1" value="u0" />
                <StateAssignment variable="u" value="u0" />
                <StateAssignment variable="u1_every" value="u0" />
                <StateAssignment variable="u_every" value="u0" />
                <StateAssignment variable="Pv" value="1" />
                <StateAssignment variable="tsyn" value="t" />
            </OnStart>

            <OnEvent port="in">
                <StateAssignment variable="u" value="u_every" />
                <StateAssignment variable="u1" value="u1_every" />
                <StateAssignment variable="tsyn" value="t" />
            </OnEvent>

            <!-- No harm in these being calculated all the time, instead of just at a spike event -->
            <OnCondition test="random(1) .lt. Pr" >
                <StateAssignment variable="Pv" value="Pv_tmp - (u * Pv_tmp)" />
                <StateAssignment variable="A_AMPA" value="A_AMPA + weight * factor_AMPA" />
                <StateAssignment variable="B_AMPA" value="B_AMPA + weight * factor_AMPA" />
                <StateAssignment variable="A_NMDA" value="A_NMDA + weight * weight_factor_NMDA * factor_NMDA" />
                <StateAssignment variable="B_NMDA" value="B_NMDA + weight * weight_factor_NMDA * factor_NMDA" />
            </OnCondition>

        </Dynamics>

    </ComponentType>

</neuroml>
